// SBML level 2 version 4

model LotkaVolterra()

  // Compartments:
  compartment cell = 1;

  // Species:
  species Prey in cell = 30/cell;  // substance in item
  species Predator in cell = 5/cell;  // substance in item

  // Parameters:
  alpha = 2 per_second;
  beta = 0.001 per_item_second;
  gamma = 0.001 per_second;
  time_delay = 0.25 per_second;

  // Reactions:
  PreyGrowth: Prey => 2 Prey; alpha*Prey^1;
  Predation: Prey + 2 Predator => 3 Predator; beta*Prey^1*Predator^2;
  PredatorDeath: Predator => ; gamma*Predator^1;

  // Events:
  IncreasePreyGrowth: at (time_delay) after (Prey < 10), fromTrigger=false: Prey = 50, Predator = 10;
  AddPray: at (time_delay) after (time >= 0.01): Prey = Prey + 100, Predator = 1;
  ReducePredationRate: at (Predator > 5): Predator = 1;
  ReducePredationRate: at ((time >= 0.25) && (time < 1)): Predator = Prey + 2;

  // Unit definitions:
  unit per_second = 1 / second;
  unit per_item_second = 1 / (item * second);
end
